* Options
OPTI DIME 2 ELEM QUA4 EPSILON LINEAIRE;
DENS 1;

P1 = -0.5 0;
P2 =  0.5 0;

LT = DROI 1 P1 P2;

* Graphic outputs
OPTI SORT
'C:\Users\BR232186\Desktop\CastLab_OOP\DEV_SYNC\idefix.mail';
SORT LT;


FIN;
